<?xml version="1.0" encoding="UTF-8"?>
<neuroml xmlns="http://www.neuroml.org/schema/neuroml2"
    xmlns:xsi="http://www.w3.org/2001/XMLSchema-instance"
    xsi:schemaLocation="http://www.neuroml.org/schema/neuroml2 https://raw.github.com/NeuroML/NeuroML2/development/Schemas/NeuroML2/NeuroML_v2beta4.xsd"
    id = "NeuroML2_file_exported_from_NEURON">

  <notes> NeuroML 2 file generated from ModelView by: NEURON -- Release 7.4 (1370:16a7055d4a86) 2015-11-09
          Authors: Michael Hines, Sushil Kambampati and Padraig Gleeson,
          Yale University and UCL
  </notes>

  <cell id="Cell0">
    <notes>Cell: Cell0 exported from NEURON ModelView</notes>
    <morphology id="morphology">
<!-- Section: soma (segmentGroup: soma) which has 8 3D points, so 7 segment(s)-->
      <segment id="0" name = "Seg0_soma">
        <proximal x="1.21046" y="-0.119391" z="0" diameter="13.6141"/>
        <distal x="0.592745" y="0.0087091" z="3.0949" diameter="12.1169"/>
      </segment>
      <segment id="2" name = "Seg1_soma">
        <parent segment="0"/>
        <distal x="1.64126" y="0.68907" z="6.05" diameter="9.3586"/>
      </segment>
      <segment id="3" name = "Seg2_soma">
        <parent segment="2"/>
        <distal x="1.24401" y="0.320847" z="9.05" diameter="6.46554"/>
      </segment>
      <segment id="4" name = "Seg3_soma">
        <parent segment="3"/>
        <distal x="0.602464" y="0.65311" z="-3" diameter="13.3165"/>
      </segment>
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
<!-- Section: soma (segmentGroup: soma) which has 8 3D points, so 7 segment(s)-->

      <segmentGroup id = "soma"  neuroLexId="sao864921383">
         <notes>This group contains an unbranched set of segments, and all of the segmentGroups marked with
             neuroLexId = sao864921383 form a non-overlapping set of all of the segments.
             These segmentGroups correspond to the 'cables' of NeuroML v1.8.1, and map to/from NEURON sections.</notes>
        <member segment = "0"/>
        <member segment = "2"/>
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      </segmentGroup>

<!-- Section: dend[32] (segmentGroup: dend_32) which has 13 3D points, so 12 segment(s)-->

      <segmentGroup id = "dend_32"  neuroLexId="sao864921383">
         <notes>This group contains an unbranched set of segments, and all of the segmentGroups marked with
             neuroLexId = sao864921383 form a non-overlapping set of all of the segments.
             These segmentGroups correspond to the 'cables' of NeuroML v1.8.1, and map to/from NEURON sections.</notes>
        <member segment = "2495"/>
        <member segment = "2496"/>
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      </segmentGroup>

<!-- Section: dend[31] (segmentGroup: dend_31) which has 45 3D points, so 44 segment(s)-->

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
    </morphology>
  </cell>

  <network id="network" type="networkWithTemperature" temperature="23 degC">
    <population id="Pop_Cell0" component="Cell0" size="1" type="populationList">
        <instance id="0">
            <location x="0" y="0" z="0"/>
        </instance>
    </population>
  </network>

</neuroml>
